<?xml version="1.0" encoding="ISO-8859-1"?>
<neuroml xmlns="http://www.neuroml.org/schema/neuroml2" xmlns:xsi="http://www.w3.org/2001/XMLSchema-instance" xsi:schemaLocation="http://www.neuroml.org/schema/neuroml2 https://raw.github.com/NeuroML/NeuroML2/development/Schemas/NeuroML2/NeuroML_v2beta4.xsd" id="KDR_Hippo_ChannelML">

    <notes>ChannelML file containing a single Channel description</notes>

    <ionChannel id="KDR_Hippo_ChannelML" conductance="10pS" type="ionChannelHH" species="k">

        <notes>Simple example of K conductance in M. C. Vanier and J. M. Bower, A Comparative Survey of Automated Parameter-Searching Methods for Compartmental Neural Models</notes>

        <annotation>
            <rdf:RDF xmlns:rdf="http://www.w3.org/1999/02/22-rdf-syntax-ns#">
                <rdf:Description rdf:about="KDR_Hippo_ChannelML">

                    <bqmodel:isDescribedBy xmlns:bqmodel="http://biomodels.net/model-qualifiers/">
                        <rdf:Bag>
                            <rdf:li>M. C. Vanier and J. M. Bower, A Comparative Survey of Automated Parameter-Searching Methods for Compartmental Neural Models, .</rdf:li>
                            <rdf:li rdf:resource="http://www.ncbi.nlm.nih.gov/entrez/query.fcgi?cmd=Retrieve&amp;db=pubmed&amp;dopt=Abstract&amp;list_uids=12991237"/>
                        </rdf:Bag>
                    </bqmodel:isDescribedBy>

                    <bqbiol:isVersionOf xmlns:bqbiol="http://biomodels.net/biology-qualifiers/">
                        <rdf:Bag>
                            <rdf:li>K channels</rdf:li>
                            <rdf:li rdf:resource="http://senselab.med.yale.edu/senselab/NeuronDB/channelGene2.htm#table3"/>
                        </rdf:Bag>
                    </bqbiol:isVersionOf>

                </rdf:Description>
            </rdf:RDF>
        </annotation>

        <gate id="n" type="gateHHrates" instances="1">
            <forwardRate type="HHExpLinearRate" rate="-8per_ms" midpoint="-39.2mV" scale="-5mV"/>
            <reverseRate type="HHExpRate" rate="250per_ms" midpoint="-54.3mV" scale="-40mV"/>
        </gate>

    </ionChannel>

</neuroml>
