<?xml version="1.0" encoding="UTF-8"?>
<channelml xmlns="http://morphml.org/channelml/schema" xmlns:xsi="http://www.w3.org/2001/XMLSchema-instance" xmlns:meta="http://morphml.org/metadata/schema" xsi:schemaLocation="http://morphml.org/channelml/schema  http://www.neuroml.org/NeuroMLValidator/NeuroMLFiles/Schemata/v1.8.1/Level2/ChannelML_v1.8.1.xsd" units="SI Units">

    <meta:notes>ChannelML file containing a single Channel description from Vanier and Bower 1999</meta:notes>

    <channel_type name="KCa_2_ChannelML">

        <status value="stable">
            <meta:comment>SK type calcium dependent K channel from Vanier and Bower 1999</meta:comment>
            <meta:contributor>
                <meta:name>Simon O'Connor</meta:name>
            </meta:contributor>
        </status>

        <meta:notes>SK type Ca2+ dependent K+ channel from Vanier and Bower 1999</meta:notes>

         <meta:publication>
            <meta:fullTitle>M. C. Vanier and J. M. Bower (1999) A Comparative Survey of Automated Parameter-Searching Methods for Compartmental Neural Models Journal of Computational Neuroscience 7, 149-171.</meta:fullTitle>
            <meta:pubmedRef>http://www.ncbi.nlm.nih.gov/pubmed/10515252</meta:pubmedRef>
        </meta:publication>

            <!--float EREST_ACT = -0.0743 // superficial pyramidal cell resting potential
float ENA       =  0.055
float EK        = -0.075
float ECA       =  0.080

        Ek     -96e-03     \

    float xmin  = 0.0
    float xmax  = 5.2e-06
    int   xdivs = 50

    call {chanpath} TABCREATE Z {xdivs} {xmin} {xmax}

    int i
    float x, dx, y

    dx = (xmax - xmin) / xdivs
    x  = xmin

    for (i = 0; i <= xdivs; i = i + 1)
        if (x < 4.2e-06)
            y = 10.0 * x / 8.2e-06
        else
            y = 10.0
        end

        setfield {chanpath} Z_A->table[{i}] {y}
        setfield {chanpath} Z_B->table[{i}] {y + 0.5}
        x = x + dx
    end

    setfield {chanpath} Z_A->calc_mode 0 Z_B->calc_mode 0
    call {chanpath} TABFILL Z 3000 0

    // Scale the time constants down by a factor of 10.

    scaletabchan {chanpath} Z tau 1.0 0.1 0.0 0.0

    if (!{exists {chanpath} addmsg1})
        addfield {chanpath} addmsg1
    end

    setfield  {chanpath} addmsg1 "../Ca_conc . CONCEN Ca"
end>-->

        <parameters>
            <parameter name="invc1" value="80e-3"/>
            <parameter name="invc2" value="80e-3"/>
            <parameter name="invc3" value="200e-3"/>

            <parameter name="invo1" value="1"/>
            <parameter name="invo2" value="100e-3"/>
            <parameter name="diro1" value="160e-3"/>
            <parameter name="diro2" value="1.2"/>

            <parameter name="dirc2" value="200"/>
            <parameter name="dirc3" value="160"/>
            <parameter name="dirc4" value="80"/>

            <parameter name="diff" value="3"/>                 <!-- diffusion factor -->

        </parameters>

        <current_voltage_relation cond_law="ohmic" ion="k" default_gmax="36" default_erev="-77.0">

            <conc_dependence name="Calcium" ion="ca" charge="2" variable_name="ca_conc" min_conc="0" max_conc="0.050"/>

            <q10_settings q10_factor="3" experimental_temp="23"/>

            <gate name="n" instances="1">

                <closed_state id="c1"/>
                <closed_state id="c2"/>
                <closed_state id="c3"/>
                <closed_state id="c4"/>

                <open_state id="o1"/>
                <open_state id="o2"/>

                <transition name="alpha_c1_c2" from="c1" to="c2" expr_form="generic" expr="dirc2 * (ca_conc*1e6/diff)"/>
                <transition name="beta_c2_c1" from="c2" to="c1" expr_form="generic" expr="invc1"/>

                <transition name="alpha_c2_c3" from="c2" to="c3" expr_form="generic" expr="dirc3 * (ca_conc*1e6/diff)"/>
                <transition name="beta_c3_c2" from="c3" to="c2" expr_form="generic" expr="invc2"/>

                <transition name="alpha_c3_c4" from="c3" to="c4" expr_form="generic" expr="dirc4 * (ca_conc*1e6/diff)"/>
                <transition name="beta_c4_c3" from="c4" to="c3" expr_form="generic" expr="invc3"/>

                <transition name="alpha_c3_o1" from="c3" to="o1" expr_form="generic" expr="diro1"/>
                <transition name="beta_o1_c3" from="o1" to="c3" expr_form="generic" expr="invo1"/>

                <transition name="alpha_c4_o2" from="c4" to="o2" expr_form="generic" expr="diro2"/>
                <transition name="beta_o2_c4" from="o2" to="c4" expr_form="generic" expr="invo2"/>

            </gate>
        </current_voltage_relation>

    </channel_type>

</channelml>
