<?xml version="1.0" encoding="UTF-8"?>
<channelml xmlns="http://morphml.org/channelml/schema"
           xmlns:xsi="http://www.w3.org/2001/XMLSchema-instance"
           xmlns:meta="http://morphml.org/metadata/schema"
           xsi:schemaLocation="http://morphml.org/channelml/schema http://www.neuroml.org/NeuroMLValidator/NeuroMLFiles/Schemata/v1.8.0/Level2/ChannelML_v1.8.0.xsd"
           units="SI Units">

    <meta:notes>ChannelML file containing a single Channel description</meta:notes>

    <channel_type name="KDR_Hippo_ChannelML">

        <status value="stable">
            <meta:comment>Equations fromM. C. Vanier and J. M. Bower, A Comparative Survey of Automated Parameter-Searching Methods for Compartmental Neural Models</meta:comment>
            <meta:contributor>
                <meta:name>Simon O'Connor</meta:name>
            </meta:contributor>
        </status>

        <meta:notes>Simple example of K conductance in M. C. Vanier and J. M. Bower, A Comparative Survey of Automated Parameter-Searching Methods for Compartmental Neural Models</meta:notes>

        <meta:authorList>
            <meta:modelTranslator>
                <meta:name>Simon O'Connor</meta:name>
                <meta:institution>Cardiff University</meta:institution>
                <meta:email>simon.oconnor - at - btinternet.com</meta:email>
            </meta:modelTranslator>
        </meta:authorList>

        <meta:publication>
            <meta:fullTitle>M. C. Vanier and J. M. Bower, A Comparative Survey of Automated Parameter-Searching Methods for Compartmental Neural Models, .</meta:fullTitle>
            <meta:pubmedRef>http://www.ncbi.nlm.nih.gov/entrez/query.fcgi?cmd=Retrieve&amp;db=pubmed&amp;dopt=Abstract&amp;list_uids=12991237</meta:pubmedRef>
        </meta:publication>

        <meta:neuronDBref>
            <meta:modelName>K channels</meta:modelName>
            <meta:uri>http://senselab.med.yale.edu/senselab/NeuronDB/channelGene2.htm#table3</meta:uri>
        </meta:neuronDBref>

                    <!--float EREST_ACT = -0.0743 // superficial pyramidal cell resting potential
float ENA       =  0.055
float EK        = -0.075
float ECA       =  0.080

    setupalpha {chanpath} X       \
        {16.0e3*(0.0351 + EREST_ACT)}  \	//16.0e3 * -0.0392 = -627.2
        -16.0e3                        \
        -1.0                           \
        {-1.0 * (0.0351 + EREST_ACT)}  \	//-1.0 * -0.0392
        -0.005                         \
        250.0                          \
        0.0                            \
        0.0                            \
        {-1.0*(0.02 + EREST_ACT)}      \	//-1.0 *
        0.04                           \
        -size 3000 -range -0.1 0.1>-->

        <current_voltage_relation cond_law="ohmic" ion="k" default_gmax="270" default_erev="-0.075">

            <gate name="n" instances="1">
                <closed_state id="n0"/>
                <open_state id="n"/>

               <transition name="alpha" from="n0" to="n" expr_form="generic" expr="(v + 0.0392) &lt; 1e-6 &amp;&amp; (-v-0.0392) &lt; 1e-6? 79.4679 : ((-1.0 * 627.2) + (-1.0 * 16000 * v))/(-1.0 + (exp (-1.0 * (v + 0.0392)/ 0.005)))"/>
                <transition name="beta" from="n" to="n0" expr_form="generic" expr="250.0 /(exp ((v + 0.0543)/ 0.04))"/>

            </gate>
        </current_voltage_relation>

	<impl_prefs>
		<table_settings max_v="0.1" min_v="-0.1" table_divisions="3000"/>
	</impl_prefs>

    </channel_type>
</channelml>
