<?xml version="1.0" encoding="UTF-8"?>
<channelml xmlns="http://morphml.org/channelml/schema" xmlns:xsi="http://www.w3.org/2001/XMLSchema-instance" xmlns:meta="http://morphml.org/metadata/schema" xsi:schemaLocation="http://morphml.org/channelml/schema  http://www.neuroml.org/NeuroMLValidator/NeuroMLFiles/Schemata/v1.8.1/Level2/ChannelML_v1.8.1.xsd" units="SI Units">

    <meta:notes>A channel from Maex, R and De Schutter, E. Synchronization of Golgi and Granule Cell Firing in a
    Detailed Network Model of the Cerebellar Granule Cell Layer</meta:notes>

    <channel_type name="Kahp2_ChannelML">

        <status value="stable">
            <meta:comment>Equations fromM. C. Vanier and J. M. Bower, A Comparative Survey of Automated Parameter-Searching Methods for Compartmental Neural Models</meta:comment>
            <meta:contributor>
                <meta:name>Simon O'Connor</meta:name>
            </meta:contributor>
        </status>

        <meta:notes>Calcium concentration dependent K+ channel</meta:notes>

        <meta:authorList>
            <meta:modelTranslator>
                <meta:name>Simon O'Connor</meta:name>
                <meta:institution>Cardiff University</meta:institution>
                <meta:email>simon.oconnor - at - btinternet.com</meta:email>
            </meta:modelTranslator>
        </meta:authorList>

        <meta:publication>
            <meta:fullTitle>M. C. Vanier and J. M. Bower, A Comparative Survey of Automated Parameter-Searching Methods for Compartmental Neural Models, .</meta:fullTitle>
            <meta:pubmedRef>http://www.ncbi.nlm.nih.gov/entrez/query.fcgi?cmd=Retrieve&amp;db=pubmed&amp;dopt=Abstract&amp;list_uids=12991237</meta:pubmedRef>
        </meta:publication>

        <meta:neuronDBref>
            <meta:modelName>K+ channels</meta:modelName>
            <meta:uri>http://senselab.med.yale.edu/senselab/NeuronDB/channelGene2.htm#table3</meta:uri>
        </meta:neuronDBref>

        <!--        Ek     -96e-03     \
        Gbar   %Max Conductance Density%           \
        Ik     0           \
        Gk     0           \
        Xpower 0           \
        Ypower 0           \
        Zpower 1

    float xmin  = 0.0
    float xmax  = 5.2e-06
    int   xdivs = 50

    call {chanpath} TABCREATE Z {xdivs} {xmin} {xmax}

    int i
    float x, dx, y

    dx = (xmax - xmin) / xdivs
    x  = xmin

    for (i = 0; i <= xdivs; i = i + 1)
        if (x < 4.2e-06)
            y = 10.0 * x / 8.2e-06
        else
            y = 10.0
        end

        setfield {chanpath} Z_A->table[{i}] {y}
        setfield {chanpath} Z_B->table[{i}] {y + 0.5}
        x = x + dx
    end

    setfield {chanpath} Z_A->calc_mode 0 Z_B->calc_mode 0
    call {chanpath} TABFILL Z 3000 0

    // Scale the time constants down by a factor of 10.

    scaletabchan {chanpath} Z tau 1.0 0.1 0.0 0.0

    if (!{exists {chanpath} addmsg1})
        addfield {chanpath} addmsg1
    end

    setfield  {chanpath} addmsg1 "../Ca_buffer . CONCEN Ca" -->

        <current_voltage_relation cond_law="ohmic" ion="k" default_gmax="20.0" default_erev="-0.096">
	    <q10_settings q10_factor="10.0" experimental_temp="1.0"/>

            <conc_dependence name="Calcium" ion="ca" charge="2" variable_name="ca_conc" min_conc="0.0" max_conc="5.2e-06"/>

            <gate name="m" instances="1">
                <closed_state id="m0"/>
                <open_state id="m"/>
    						        <!-- if (ca_conc < 4.2e-06) 10.0 * ca_conc/ 8.2e-06 else 10.0-->

                <transition name="alpha" from="m0" to="m" expr_form="generic" expr="ca_conc &lt; 4.2e-06 ? 10.0 * ca_conc/ 8.2e-06 : 10.0"/>
    						        <!-- if (ca_conc < 4.2e-06) (10.0 * ca_conc/ 8.2e-06) = 0.5 else 10.5-->

                <transition name="beta" from="m" to="m0" expr_form="generic" expr="0.5"/>

            </gate>
        </current_voltage_relation>

	<impl_prefs>
		<table_settings table_divisions="3000"/>
	</impl_prefs>

    </channel_type>
</channelml>
