<?xml version="1.0" encoding="UTF-8"?>
<channelml xmlns="http://morphml.org/channelml/schema" xmlns:xsi="http://www.w3.org/2001/XMLSchema-instance" xmlns:meta="http://morphml.org/metadata/schema" xsi:schemaLocation="http://morphml.org/channelml/schema  http://www.neuroml.org/NeuroMLValidator/NeuroMLFiles/Schemata/v1.8.1/Level2/ChannelML_v1.8.1.xsd" units="SI Units">

    <meta:notes>ChannelML file containing a single Channel description</meta:notes>

    <channel_type name="Na_Hippo_ChannelML" density="yes">

        <status value="stable">
            <meta:comment>Implementation of Hippocampal sodium channel</meta:comment>
            <meta:contributor>
                <meta:name>Simon O'Connor</meta:name>
            </meta:contributor>
        </status>

        <meta:notes>Hippocampal Na channel in Vanier and Bower (1999)</meta:notes>

        <meta:authorList>
            <meta:modelTranslator>
                <meta:name>Simon O'Connor</meta:name>
                <meta:institution>unaffiliated</meta:institution>
                <meta:email>simon.oconnor - at - btinternet.com</meta:email>
            </meta:modelTranslator>
        </meta:authorList>

        <meta:publication>
            <meta:fullTitle>M.C. Vanier and J.M. Bower A comparative survey of automated parameter-search methods for compartmental neural models. Journal of Computational Neuroscience 7, 149-171. 1999</meta:fullTitle>
            <meta:pubmedRef>http://www.ncbi.nlm.nih.gov/entrez/query.fcgi?cmd=Retrieve&amp;db=pubmed&amp;dopt=Abstract&amp;list_uids=10515252</meta:pubmedRef>
        </meta:publication>

        <meta:neuronDBref>
            <meta:modelName>Na channels</meta:modelName>
            <meta:uri>http://senselab.med.yale.edu/senselab/NeuronDB/channelGene2.htm#table2</meta:uri>
        </meta:neuronDBref>

                                                                    <!-- Na Hippocampal cell (Vanier Piriform Pyramidal Cells)

Channel equilibrium potentials (V)
EREST_ACT = -0.0743  ENA = 0.055
THRESHOLD_OFFSET = 0.025

setupalpha Na X  \
        {320.0e3 * (0.0131 + EREST_ACT + THRESHOLD_OFFSET)} \	// 320.0e3 * -0.0362 = -11584
        -320.0e3                                            \
        -1.0                                                \
        {-1.0*(0.0131 + EREST_ACT + THRESHOLD_OFFSET)}      \  // -1.0* -0.0362
        -0.004                                              \
        {-280.0e3*(0.0401 + EREST_ACT + THRESHOLD_OFFSET)}  \  // -280.0e3 * -0.0092
        280.0e3                                             \
        -1.0                                                \
        {-1.0*(0.0401 + EREST_ACT + THRESHOLD_OFFSET)}      \
        5.0e-3                                              \
        -size 3000 -range -0.1 0.1>-->

                                                                    <!--Converting to ChannelML:

Na X: Alpha

320.0e3*(-0.0362) / 320.0e3*V/-1.0 + exp((v + 0.0362)/-0.004)

Can this be converted to the form:

Exponential Linear A * ((v-V1/2)/B) / (1 - exp(-((v-V1/2)/B)))

= -320.0e3*(v + 0.0362) /-1.0 + exp((v + 0.0362)/-0.004)

= (-320.0e3*-0.004)*((v + 0.0362)/-0.004)/-1.0 + exp((v + 0.0362)/-0.004)

= 1280*((v + 0.0362)/-0.004)/-1.0 + exp((v + 0.0362)/-0.004)

Which is an equation of the form:

Generic A * ((v-V1/2)/B) / (-1 + exp((v-V1/2)/B))

A = 1280 V1/2 = -0.0362 B = -0.004

Na X:Beta

-280.0e3*-0.0092 + 280.0e3*V/-1.0 + exp((v + 0.0092)/0.005)

Can this be converted to the form:

Exponential Linear A * ((v-V1/2)/B) / (1 - exp(-((v-V1/2)/B)))

280.0e3*(V + 0.0092)/-1.0 + exp((v + 0.0092)/0.005)

(280.0e3*0.005)*((V + 0.0092)/0.005)/-1.0 + exp((v + 0.0092)/0.005)

1400*((V + 0.0092)/0.005)/-1.0 + exp((v + 0.0092)/0.005)

Which is an equation of the form:

Generic A * ((v-V1/2)/B) / (-1 + exp((v-V1/2)/B))>-->

                                                                   <!--A = 1400 V1/2 = -0.0092 B = 0.005
setupalpha Na Y   \
       AA 128.0                                               \
       AB 0.0                                                 \
       AC 0.0                                                 \
       AD {-1.0*(0.017 + EREST_ACT + THRESHOLD_OFFSET)}       \		// -1.0 * -0.0323
       AF 0.018                                               \
       BA 4.0e3                                               \
       BB 0.0                                                 \
       BC 1.0                                                 \
       BD {-1.0*(0.040 + EREST_ACT + THRESHOLD_OFFSET)}       \		// -1.0 * -0.0093
       BF -5.0e-3                                             \
        -size 3000 -range -0.1 0.1

Converting to ChannelML:

Na Y: Alpha

128.0 /exp((v + 0.0323)/0.018)

Can this be converted to the form:

Exponential Linear A * ((v-V1/2)/B) / (1 - exp(-((v-V1/2)/B)))

Na Y:Beta

4000/(1.0 + exp((V + 0.0093)/-0.0005))>-->

        <current_voltage_relation cond_law="ohmic" ion="na" default_erev="0.055" default_gmax="2800">

            <gate name="m" instances="2">
                <closed_state id="m0"/>
                <open_state id="m"/>

                <transition name="alpha" from="m0" to="m" expr_form="generic" expr="(v + 0.0362) &lt; 1e-6 &amp;&amp; (-v-0.0362) &lt; 1e-6? 1269.36 : ((-1.0 * 11584) + (-1.0 * 320000 * v)) / (-1.0 + (exp (-1.0 * (v + 0.0362)/ 0.004 )))"/>
                <transition name="beta" from="m" to="m0" expr_form="generic" expr="(v + 0.0092) &lt; 1e-6 &amp;&amp; (-v-0.0092) &lt; 1e-6? 18688.4 :(2576 + (280000 * v)) / (-1.0 + (exp ((v + 0.0092)/ 0.005)))"/>
            </gate>

            <gate name="h" instances="1">
                <closed_state id="h0"/>
                <open_state id="h"/>

                <transition name="alpha" from="h0" to="h" expr_form="generic" expr="128.0 /(exp ((v + 0.0323)/0.018))"/>
                <transition name="beta" from="h" to="h0" expr_form="generic" expr="4000/(1.0 + (exp (-1.0 * (v + 0.0093)/ 0.005)))"/>
            </gate>

        </current_voltage_relation>

	<impl_prefs>
		<table_settings max_v="0.1" min_v="-0.1" table_divisions="3000"/>
	</impl_prefs>

    </channel_type>
</channelml>
