<?xml version="1.0" encoding="UTF-8"?>
<channelml xmlns="http://morphml.org/channelml/schema" xmlns:xsi="http://www.w3.org/2001/XMLSchema-instance" xmlns:meta="http://morphml.org/metadata/schema"
xsi:schemaLocation="http://morphml.org/channelml/schema  http://www.neuroml.org/NeuroMLValidator/NeuroMLFiles/Schemata/v1.8.1/Level2/ChannelML_v1.8.1.xsd" units="SI Units">

    <meta:notes>Slow Ca current based on voltage clamp data from:
     Constanti, Galvan, Franz, and Sim Pfulgers Arch (1985)
     404:259-265
Assumptions about the existence of distinct slow current from:
     Halliwell and Scholfield Neurosci Letters (1984)
     50:13-18
Other papers about Ca currents in piriform pyramidal cells:
     Galvan, Constanti, and Franz Pfulgers Arch (1985)
     404:252-258</meta:notes>

    <channel_type name="Olfactory_Ca_ChannelML">

        <status value="stable">
            <meta:comment>Verified equivalence of NEURON and GENESIS mapping to orig GENESIS impl from www.tnb.ua.ac.be.</meta:comment>
            <meta:contributor>
                <meta:name>Simon O'Connor</meta:name>
            </meta:contributor>
        </status>

        <meta:notes>A-type K channel, with rate equations expressed in tau and inf form</meta:notes>

        <meta:authorList>
            <meta:modelTranslator>
                <meta:name>Simon OConnor</meta:name>
                <meta:institution>Cardiff University</meta:institution>
                <meta:email>simon.oconnor - at - btinternet.com</meta:email>
            </meta:modelTranslator>
        </meta:authorList>

        <meta:publication>
           <meta:fullTitle>M. C. Vanier and J. M. Bower (1999) A Comparative Survey of Automated Parameter-Searching Methods for Compartmental Neural Models. Journal of Computational Neuroscience 7, 149-171.</meta:fullTitle>
           <meta:pubmedRef>http://www.ncbi.nlm.nih.gov/entrez/query.fcgi?cmd=Retrieve&amp;db=PubMed&amp;list_uids=10515252&amp;dopt=Abstract</meta:pubmedRef>
        </meta:publication>

        <meta:neuronDBref>
           <meta:modelName>Calcium channels</meta:modelName>
           <meta:uri>http://senselab.med.yale.edu/senselab/NeuronDB/channelGene2.htm#table1</meta:uri>
        </meta:neuronDBref>

        <current_voltage_relation cond_law="ohmic" ion="ca" default_gmax="10.0" default_erev="0.113" charge="2" fixed_erev="yes">

        <!--

    float ECa = 0.113
    int i
    float x, dx, y

    create tabchannel {chanpath}
    setfield {chanpath}       \
        Ek     {ECa}             \
        Gbar   %Max Conductance Density%                \
        Ik     0                 \
        Gk     0                 \
        Xpower 1                 \
        Ypower 1                 \
        Zpower 0

    call {chanpath} TABCREATE X 49 -0.1 0.1
    x = -0.1
    dx = 0.2 / 49.0

    for (i = 0; i <= 49; i = i + 1)
        y = 1.0e-03 / \
            ({exp {(x + .0032)/(-.0067)}} + {exp {(x + 0.0168)/0.0182}}) + 0.003
        setfield {chanpath} X_A->table[{i}] {y}
        y = 1.0 / (1.0 + {exp {(x + 0.032)/(-0.010)}})
        setfield {chanpath} X_B->table[{i}] {y}
        x = x + dx
    end

    call {chanpath} TABCREATE Y 49 -0.1 0.1
    x  = -0.1
    dx = 0.2 / 49.0

    for (i = 0; i <= 49; i = i + 1)
        y = (0.35 / ({exp {(x + 0.035)/0.012}} + {exp {(-0.025 - x)/0.012}})) + 0.01
        setfield {chanpath} Y_A->table[{i}] {y}
        y = 1.0 / (1.0 + {exp {(x + 0.040)/(0.035)}})
        setfield {chanpath} Y_B->table[{i}] {y}
        x = x + dx
    end

    tweaktau {chanpath} X
    setfield {chanpath} X_A->calc_mode 0 X_B->calc_mode 0
    call {chanpath} TABFILL X 3000 0

    tweaktau {chanpath} Y
    setfield {chanpath} Y_A->calc_mode 0 Y_B->calc_mode 0
    call {chanpath} TABFILL Y 3000 0

//    addfield {chanpath} addmsg1
//    setfield {chanpath} addmsg1 "../Ca_bufer . CONCEN Ca"
end -->

            <gate name="m" instances="1">
                <closed_state id="m0"/>
                <open_state id="m"/>

                <time_course name="tau" from="m0" to="m" expr_form="generic" expr="0.001/ ((exp (-1.0 * (v + 0.0032)/ (0.0067))) + (exp ((v + 0.0168)/ 0.0182))) + 0.003"/>
                <steady_state name="inf" from="m0" to="m" expr_form="generic" expr="1.0 / (1.0 + (exp (-1.0 * (v + 0.032)/ (0.010))))"/>

            </gate>

            <gate name="h" instances="1">
                <closed_state id="h0"/>
                <open_state id="h"/>

                <time_course name="tau" from="h0" to="h" expr_form="generic" expr="(0.35/ ((exp ((v + 0.035)/ 0.012)) + (exp ((-1.0 * 0.025 - v)/ 0.012)))) + 0.01"/>
                <steady_state name="inf" from="h0" to="h" expr_form="generic" expr="1.0 / (1.0 + (exp ((v + 0.040)/ (0.035))))"/>

            </gate>
        </current_voltage_relation>

        <impl_prefs>
		<table_settings max_v="0.1" min_v="-0.1" table_divisions="3000"/>
	</impl_prefs>

    </channel_type>
</channelml>
