<?xml version="1.0" encoding="UTF-8"?>
<channelml xmlns="http://morphml.org/channelml/schema" xmlns:xsi="http://www.w3.org/2001/XMLSchema-instance" xmlns:meta="http://morphml.org/metadata/schema" xsi:schemaLocation="http://morphml.org/channelml/schema  http://www.neuroml.org/NeuroMLValidator/NeuroMLFiles/Schemata/v1.8.1/Level2/ChannelML_v1.8.1.xsd" units="SI Units">

    <meta:notes>ChannelML file containing a single Channel description</meta:notes>

    <channel_type name="Persistent_Na_ChannelML" density="yes">

        <status value="stable">
            <meta:comment>Based on an impementation for Thalamocortical cells</meta:comment>
            <meta:contributor>
                <meta:name>Simon O'Connor</meta:name>
            </meta:contributor>
        </status>

        <meta:notes>Persistent Na channel in Vanier and Bower (1999) based on implementation in McCormick and Huguenard (1992)</meta:notes>

        <meta:authorList>
            <meta:modelTranslator>
                <meta:name>Simon O'Connor</meta:name>
                <meta:institution>unafilliated</meta:institution>
                <meta:email>simon.oconnor - at - btinternet.com</meta:email>
            </meta:modelTranslator>
        </meta:authorList>

        <meta:publication>
            <meta:fullTitle>D.A. McCormick and J.R. Huguenard. A model of the electrophysiological properties of thalamocortical relay neurons. Journal of Neurophysiology 68, 1384-1399</meta:fullTitle>
            <meta:pubmedRef>http://www.ncbi.nlm.nih.gov/entrez/query.fcgi?cmd=Retrieve&amp;db=pubmed&amp;dopt=Abstract&amp;list_uids=1331356</meta:pubmedRef>
        </meta:publication>

        <meta:neuronDBref>
            <meta:modelName>Na channels</meta:modelName>
            <meta:uri>http://senselab.med.yale.edu/senselab/NeuronDB/channelGene2.htm#table2</meta:uri>
        </meta:neuronDBref>

        <!--float EREST_ACT = -0.0743 // superficial pyramidal cell resting potential
float ENA       =  0.055
float EK        = -0.075
float ECA       =  0.080

    call {chanpath} TABCREATE X 49 -0.1 0.1
    x  = -0.1
    dx = 0.2/49.0

    for (i = 0; i <= 49; i = i + 1)
        y = 1.0 / (91e3*(x + 0.048)/(1.0 - {exp {(-0.048 - x)/0.005}}) + \
            -62e3 * (x + 0.048)/(1.0 - {exp {(x + 0.048)/0.005}}))
        setfield {chanpath} X_A->table[{i}] {y}

        y = 1.0 / (1.0 + {exp {(-0.043 - x)/0.005}})
        setfield {chanpath} X_B->table[{i}] {y}

        x = x + dx
    end

    tweaktau {chanpath} X
    setfield {chanpath} X_A->calc_mode 0  \
        X_B->calc_mode 0
    call {chanpath} TABFILL X 3000 0>-->

        <current_voltage_relation cond_law="ohmic" ion="na" default_erev="0.055" default_gmax="65">

            <gate name="m" instances="1">
                <closed_state id="m0"/>
                <open_state id="m"/>

                <time_course name="tau" from="m0" to="m" expr_form="generic" expr="v == -0.048 ? 1.0 / (91000 * (v + 0.04801)/ (1.0 - (exp ((-1.0 * 0.04801 - v)/ 0.005))) + (-1.0 * 62000) * (v + 0.04801)/ (1.0 - (exp ((v + 0.04801)/ 0.005)))) : 1.0 / (91000 * (v + 0.048)/ (1.0 - (exp ((-1.0 * 0.048 - v)/ 0.005))) + (-1.0 * 62000) * (v + 0.048)/ (1.0 - (exp ((v + 0.048)/ 0.005))))"/>
                <steady_state name="inf" from="m0" to="m" expr_form="generic" expr="1.0 / (1.0 + (exp ((-1.0 * 0.043 - v)/ 0.005)))"/>

            </gate>

        </current_voltage_relation>

	<impl_prefs>
		<table_settings max_v="0.1" min_v="-0.1" table_divisions="3000"/>
	</impl_prefs>

    </channel_type>
</channelml>
