<?xml version="1.0" encoding="ISO-8859-1"?>
<neuroml xmlns="http://www.neuroml.org/schema/neuroml2" xmlns:xsi="http://www.w3.org/2001/XMLSchema-instance" xsi:schemaLocation="http://www.neuroml.org/schema/neuroml2 https://raw.github.com/NeuroML/NeuroML2/development/Schemas/NeuroML2/NeuroML_v2beta4.xsd" id="Ca_buffer_ChannelML">

    <notes>A channel from  M. C. Vanier and J. M. Bower (1999) A Comparative Survey of Automated Parameter-Searching Methods for Compartmental Neural Models</notes>

    <decayingPoolConcentrationModel id="Ca_buffer_ChannelML" restingConc="50e-09mM" decayConstant="0.025s" ion="ca" shellThickness="1.0e-7m"/>

</neuroml>
