<?xml version="1.0" encoding="ISO-8859-1"?>
<neuroml xmlns="http://www.neuroml.org/schema/neuroml2" xmlns:xsi="http://www.w3.org/2001/XMLSchema-instance" xsi:schemaLocation="http://www.neuroml.org/schema/neuroml2 https://raw.github.com/NeuroML/NeuroML2/development/Schemas/NeuroML2/NeuroML_v2beta4.xsd" id="Olfactory_Ca_ChannelML">

    <notes>Slow Ca current based on voltage clamp data from:
     Constanti, Galvan, Franz, and Sim Pfulgers Arch (1985)
     404:259-265
Assumptions about the existence of distinct slow current from:
     Halliwell and Scholfield Neurosci Letters (1984)
     50:13-18
Other papers about Ca currents in piriform pyramidal cells:
     Galvan, Constanti, and Franz Pfulgers Arch (1985)
     404:252-258</notes>

    <ionChannel id="Olfactory_Ca_ChannelML" conductance="10pS" type="ionChannelHH" species="ca">

        <notes>A-type K channel, with rate equations expressed in tau and inf form</notes>

        <annotation>
            <rdf:RDF xmlns:rdf="http://www.w3.org/1999/02/22-rdf-syntax-ns#">
                <rdf:Description rdf:about="Olfactory_Ca_ChannelML">

                    <bqmodel:isDescribedBy xmlns:bqmodel="http://biomodels.net/model-qualifiers/">
                        <rdf:Bag>
                            <rdf:li>M. C. Vanier and J. M. Bower (1999) A Comparative Survey of Automated Parameter-Searching Methods for Compartmental Neural Models. Journal of Computational Neuroscience 7, 149-171.</rdf:li>
                            <rdf:li rdf:resource="http://www.ncbi.nlm.nih.gov/entrez/query.fcgi?cmd=Retrieve&amp;db=PubMed&amp;list_uids=10515252&amp;dopt=Abstract"/>
                        </rdf:Bag>
                    </bqmodel:isDescribedBy>

                    <bqbiol:isVersionOf xmlns:bqbiol="http://biomodels.net/biology-qualifiers/">
                        <rdf:Bag>
                            <rdf:li>Calcium channels</rdf:li>
                            <rdf:li rdf:resource="http://senselab.med.yale.edu/senselab/NeuronDB/channelGene2.htm#table1"/>
                        </rdf:Bag>
                    </bqbiol:isVersionOf>

                </rdf:Description>
            </rdf:RDF>
        </annotation>

        <gate id="m" type="gateHHtauInf" instances="1">
            <timeCourse type="Olfactory_Ca_ChannelML_m_tau_tau"/>
            <steadyState type="Olfactory_Ca_ChannelML_m_inf_inf"/>
        </gate>

        <gate id="h" type="gateHHtauInf" instances="1">
            <timeCourse type="Olfactory_Ca_ChannelML_h_tau_tau"/>
            <steadyState type="Olfactory_Ca_ChannelML_h_inf_inf"/>
        </gate>

    </ionChannel>

    <ComponentType name="Olfactory_Ca_ChannelML_m_tau_tau" extends="baseVoltageDepTime">
        <Constant name="TIME_SCALE" dimension="time" value="1 s"/>
        <Constant name="VOLT_SCALE" dimension="voltage" value="1 V"/>

        <Dynamics>
            <DerivedVariable name="V" dimension="none" value="v / VOLT_SCALE"/>
            <DerivedVariable name="t" exposure="t" dimension="time" value="(0.001/ ((exp (-1.0 * (V + 0.0032)/ (0.0067))) + (exp ((V + 0.0168)/ 0.0182))) + 0.003) * TIME_SCALE"/>
        </Dynamics>

    </ComponentType>

    <ComponentType name="Olfactory_Ca_ChannelML_m_inf_inf" extends="baseVoltageDepVariable">
        <Constant name="TIME_SCALE" dimension="time" value="1 s"/>
        <Constant name="VOLT_SCALE" dimension="voltage" value="1 V"/>

        <Dynamics>
            <DerivedVariable name="V" dimension="none" value="v / VOLT_SCALE"/>
            <DerivedVariable name="x" exposure="x" dimension="none" value="1.0 / (1.0 + (exp (-1.0 * (V + 0.032)/ (0.010))))"/>
        </Dynamics>

    </ComponentType>

    <ComponentType name="Olfactory_Ca_ChannelML_h_tau_tau" extends="baseVoltageDepTime">
        <Constant name="TIME_SCALE" dimension="time" value="1 s"/>
        <Constant name="VOLT_SCALE" dimension="voltage" value="1 V"/>

        <Dynamics>
            <DerivedVariable name="V" dimension="none" value="v / VOLT_SCALE"/>
            <DerivedVariable name="t" exposure="t" dimension="time" value="((0.35/ ((exp ((V + 0.035)/ 0.012)) + (exp ((-1.0 * 0.025 - V)/ 0.012)))) + 0.01) * TIME_SCALE"/>
        </Dynamics>

    </ComponentType>

    <ComponentType name="Olfactory_Ca_ChannelML_h_inf_inf" extends="baseVoltageDepVariable">
        <Constant name="TIME_SCALE" dimension="time" value="1 s"/>
        <Constant name="VOLT_SCALE" dimension="voltage" value="1 V"/>

        <Dynamics>
            <DerivedVariable name="V" dimension="none" value="v / VOLT_SCALE"/>
            <DerivedVariable name="x" exposure="x" dimension="none" value="1.0 / (1.0 + (exp ((V + 0.040)/ (0.035))))"/>
        </Dynamics>

    </ComponentType>

</neuroml>
