<?xml version="1.0" encoding="UTF-8"?>
<neuroml xmlns="http://morphml.org/neuroml/schema" xmlns:meta="http://morphml.org/metadata/schema" xmlns:mml="http://morphml.org/morphml/schema" xmlns:bio="http://morphml.org/biophysics/schema" xmlns:cml="http://morphml.org/channelml/schema" xmlns:net="http://morphml.org/networkml/schema" xmlns:xsi="http://www.w3.org/2001/XMLSchema-instance" xsi:schemaLocation="http://morphml.org/neuroml/schema  http://neuroml.svn.sourceforge.net/viewvc/neuroml/trunk/web/NeuroMLFiles/Schemata/v1.8.1/Level3/NeuroML_Level3_v1.8.1.xsd" lengthUnits="micron">

    <cells>
        <cell name="Pyramidal_Neuron_ChannelML_soma">

            <meta:notes>Soma of Vanier 15 compartment pyramidal neuron modal</meta:notes>

            <mml:segments>

                <mml:segment id="0" name="Soma" cable="0">
                    <mml:proximal x="0.0" y="0.0" z="0.0" diameter="10.4"/>
                    <mml:distal x="0.0" y="21.3" z="0.0" diameter="10.4"/>
                </mml:segment>

            </mml:segments>

            <mml:cables>

                <mml:cable id="0" name="Soma">
                    <meta:group>all</meta:group>
                    <meta:group>soma_group</meta:group>
                </mml:cable>

            </mml:cables>

            <!--Adding the biophysical parameters-->

            <biophysics units="Physiological Units">

                <bio:mechanism name="Ca_buffer_ChannelML" type="Ion Concentration">    <!--Note: not adding gmax for Ion Concentration.
Value for scaling factor to apply to current to get change in conc should be
 determined from ChannelML file for the CaPool...-->

                </bio:mechanism>

                <bio:mechanism name="KDR_Hippo_ChannelML" type="Channel Mechanism">
                    <bio:parameter name="gmax" value="27.0">
                        <bio:group>soma_group</bio:group>
                    </bio:parameter>
                </bio:mechanism>

                <bio:mechanism name="Kahp1_ChannelML" type="Channel Mechanism">
                    <bio:parameter name="gmax" value="0.4">
                        <bio:group>soma_group</bio:group>
                    </bio:parameter>
                </bio:mechanism>

                <bio:mechanism name="Kahp2_ChannelML" type="Channel Mechanism">
                    <bio:parameter name="gmax" value="2.0">
                        <bio:group>soma_group</bio:group>
                    </bio:parameter>
                </bio:mechanism>

                <bio:mechanism name="Km_ChannelML" type="Channel Mechanism">
                    <bio:parameter name="gmax" value="10.0">
                        <bio:group>soma_group</bio:group>
                    </bio:parameter>
                </bio:mechanism>

                <bio:mechanism name="LeakConductance" type="Channel Mechanism" passive_conductance="true">
                    <bio:parameter name="e" value="-74.3">
                        <bio:group>all</bio:group>
                    </bio:parameter>
                    <bio:parameter name="gmax" value="1.98807">
                        <bio:group>all</bio:group>
                    </bio:parameter>
                </bio:mechanism>

                <bio:mechanism name="Na_Hippo_ChannelML" type="Channel Mechanism">
                    <bio:parameter name="gmax" value="280.0">
                        <bio:group>soma_group</bio:group>
                    </bio:parameter>
                </bio:mechanism>

                <bio:mechanism name="Olfactory_Ca_ChannelML" type="Channel Mechanism">
                    <bio:parameter name="gmax" value="1.0">
                        <bio:group>soma_group</bio:group>
                    </bio:parameter>
                </bio:mechanism>

                <bio:mechanism name="Persistent_Na_ChannelML" type="Channel Mechanism">
                    <bio:parameter name="gmax" value="6.5">
                        <bio:group>soma_group</bio:group>
                    </bio:parameter>
                </bio:mechanism>

                <bio:mechanism name="Piriform_KA_ChannelML" type="Channel Mechanism">
                    <bio:parameter name="gmax" value="20.0">
                        <bio:group>soma_group</bio:group>
                    </bio:parameter>
                </bio:mechanism>

                <bio:spec_capacitance>
                    <bio:parameter value="4.36">
                        <bio:group>all</bio:group>
                    </bio:parameter>
                </bio:spec_capacitance>

                <bio:spec_axial_resistance>
                    <bio:parameter value="0.0583">
                        <bio:group>all</bio:group>
                    </bio:parameter>
                </bio:spec_axial_resistance>

                <bio:init_memb_potential>
                    <bio:parameter value="-74.3">
                        <bio:group>all</bio:group>
                    </bio:parameter>
                </bio:init_memb_potential>

                <bio:ion_props name="k">
                    <bio:parameter name="e" value="-75.0">
                        <bio:group>all</bio:group>
                    </bio:parameter>
                </bio:ion_props>

                <bio:ion_props name="km">
                    <bio:parameter name="e" value="-96.0">
                        <bio:group>all</bio:group>
                    </bio:parameter>
                </bio:ion_props>

                <bio:ion_props name="na">
                    <bio:parameter name="e" value="55.0">
                        <bio:group>all</bio:group>
                    </bio:parameter>
                </bio:ion_props>

                <bio:ion_props name="kahp">
                    <bio:parameter name="e" value="-96.0">
                        <bio:group>all</bio:group>
                    </bio:parameter>
                </bio:ion_props>

                <bio:ion_props name="ca">
                    <bio:parameter name="conc_e" value="2.0E-6">
                        <bio:group>all</bio:group>
                    </bio:parameter>

                    <bio:parameter name="conc_i" value="5.0E-14">
                        <bio:group>all</bio:group>
                    </bio:parameter>
                </bio:ion_props>
            </biophysics>

            <connectivity/>

        </cell>
    </cells>
</neuroml>
